*Heading
3D torsional actuator
**
** This input file is for the simulation of a 3D torsional actuator.
**    It is to be used use UEL subroutine, uel_dielectric_3D.for.
**
** UNITS:  Length - meters, Time - sec, Angle - radians,
**	   Force - Newtons, Stress - Newton/meter^2 = Pa,
**	   Mass - kilograms, Density - kg/meter^3, Energy - Joules
**
** The electrical units are chosen so that the permittivity is unity.
**
** To interpret the simulated electric potential in volts for a real material:
**
**       real potential = simulated potential/sqrt(real permittivity)
**
** To interpret the simulated charge in coulombs for a real material:
**
**       real charge = simulated charge*sqrt(real permittivity)
**
** REDUCED INTEGRATION: In order to use reduced integration three
**     changes should be made:
**
**     1. The element type of the dummy mesh should be changed
**        from C3D8 to C3D8R.
**     2. In the Material Definition section of this input file,
**        the '*Hourglass Stiffness' command and subsequent line
**        should be uncommented.
**     3. In the UEL subroutine, nInt should be set to 1.
**
** David L. Henann, September 2012
**
**
************************************************************************
**			PARAMETERS
************************************************************************
**
*Parameter
**
** Shear modulus (Pa)
G = 1.0e6
**
Ghour = 0.005*G
**
** Bulk modulus (Pa)
K = 1.0e9
**
** Gent parameter
Imax = 7.0
**
** Permittivity (arbitrary units)
permit = 1.0
**
** Final potential
phi = 0.5
**
** Final time (s)
tf = 1.0
**
**
************************************************************************
**			MODEL DEFINITION
************************************************************************
**
** Nodes
**
*Node, nset=nall
      1, 0.00499999989, 0.000500000024, 0.0500000007
      2, 0.00499999989,           0., 0.0500000007
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**
** Elements
**
*User Element,Nodes=8,Type=U1,Iproperties=0,Properties=4,Coordinates=3,Variables=1,Unsymm
1,2,3,11
*Element, type=U1, elset=elall
   1,  358,  359,  362,  361,    1,    2,    5,    4
   2,  359,  360,  363,  362,    2,    3,    6,    5
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**
** Make the dummy mesh, shares nodes with the real mesh,
**  allows visualization of the results, access to
**  hourglass controls, and access to mechanical,
**  traction-type boundary conditions
**
*Element, type=C3D8, elset=eldummy
10001,358,359,362,361,1,2,5,4
10002,359,360,363,362,2,3,6,5
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**
** Sets
**
** The voltage is applied to Set-1
*Nset, nset=Set-1, generate
    1,  7495,     3
**
** Set-2 is electrical ground
*Nset, nset=Set-2, generate
    3,  7497,     3
**
** The set Base is the held end of the helicoid
*Nset, nset=Base
  355,  356,  357,  712,  713,  714
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*Nset, nset=ypin, generate
  356,  7496,   357
*Nset, nset=xpin
 3926,
**
** The set Front is the end of the helicoid that is free to rotate
*Nset, nset=Front
    1,    3,  358,  360,  715,  717
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*Nset, nset=ypin_Front
    2,  359,  716, 1073, 1430, 1787
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*Nset, nset=xpin_Front
 3572,
**
** Reference nodes for imposing constraints
**
*Node, nset=nRef
 9000, 0.0, 0.0, 50.0e-3
*Node, nset=nRef1
 9001, -5.0e-3, 0.0, 50.0e-3
*Node, nset=nRef2
 9002,  5.0e-3, 0.0, 50.0e-3
*Nset, nset=nRefs
 nRef1,nRef2
**
** Make a dummy element which is not connected to anything with C3D8T
**  just so that we can have the coupled thermal-displacement
**
*Node
999992,  0.0, 0.0, 0.0
999993,  .00001, 0.0, 0.0
999994,  .00001, .00001, 0.0
999995,  0.0, .00001, 0.0
999996,  0.0, 0.0, 0.00001
999997,  .00001, 0.0, 0.00001
999998,  .00001, .00001, 0.00001
999999,  0.0, .00001, 0.00001
*Nset, nset=tempElement
999992,999993,999994,999995,999996,999997,999998,999999
*Element, Type=C3D8RT
999998,999992,999993,999994,999995,999996,999997,999998,999999
*Elset,elset=tempElement
999998
************************************************************************
**			MATERIAL DEFINITION
************************************************************************
**
** Material properties for the real material
**
*uel property,elset=elall
*******************************************************************
**G	Kbulk	Imax	permit
<G>,	<K>,	<Imax>,	<permit>
**
*******************************************************************
**
** Dummy mesh material properties
**
*Solid section, elset=ElDummy, material=Material-1
***Hourglass stiffness
**<Ghour>
*Solid section, elset=tempElement, material=Material-2
**
*Material, name=Material-1
** The dummy mesh stiffness is very small
*Elastic
1.e-20
*Density
1.0
**
*Material, name=Material-2
*Elastic
1.e-20
*Conductivity
1.0
*Density
1.0
*Specific heat
1.0
**
************************************************************************
**			INITIAL CONDITIONS
************************************************************************
*Initial conditions, type=temperature
Nall, 0.0
tempElement, 0.0
************************************************************************
**			   AMPLITUDE
************************************************************************
*Amplitude, name=Amp-1
0.0,0.0,<tf>,1.0
************************************************************************
**			   CONSTRAINTS
************************************************************************
*MPC
SLIDER,ypin_Front,nref1,nref2
*Rigid body, ref node=nRef, pin nset=nrefs
*Equation
2
Front,3,-1.0,nRef,3,1.0
2
xpin_Front,1,-1.0,nRef,1,1.0
2
xpin_Front,2,-1.0,nRef,2,1.0
2
xpin_Front,3,-1.0,nRef,3,1.0
************************************************************************
**			STEP DEFINITION
************************************************************************
*Step, Name=Actuate, nlgeom=yes, unsymm=yes, inc=50000
*Coupled temperature-displacement, deltmx=100.0
0.01,<tf>,1.e-6,0.01
*controls, parameters=line search
10,1.0,0.0001,0.25,0.10
*controls, parameters=time incrementation
,,,,,,,10,,,,,,
**
*Boundary
xpin,1,1
ypin,2,2
Base,3,3
nRef,1,2
nRef,4,5
Set-2,11,11,0.0
*Boundary, amplitude=Amp-1
Set-1,11,11,<phi>
*Boundary
tempElement,encastre
tempElement,11,11,0.0
**
*Output, field, time interval=0.02
*node output, nset=nall
u,nt
*Element output, elset=ElDummy
le
**
*Output, history, time interval=0.02
*node output, nset=nRef
u3,ur3,rf3,rm3
**
*End Step
************************************************************************
